# Transport, rail, freight; diesel powered; tier No Emissions Control

Dataset: openLCA process, unit process
Category: 48-49: Transportation and Warehousing/ 4821: Rail Transportation
Geography: United States of America (the)
Time period: 2020 to 2024
Allocation method: physical allocation
Data quality: US EPA - Process Pedigree Matrix (4;1)
Exchange data quality scheme: US EPA - Flow Pedigree Matrix
Generated by: ERG
Owner: U.S. EPA
Published in: Class 1 Line Haul Rail Transport
restrictionsDescription: These U.S. LCI Database Project data ("Data") are provided by the National Renewable Energy Laboratory ("NREL"), operated by the Alliance for Sustainable Energy, LLC ("Alliance") for the US Department of Energy ("DOE") under Contract No. DE-AC36-08GO28308. The United States Government (the "Government") retains and the user acknowledges that the Government retains a non-exclusive, paid-up, irrevocable, worldwide license to publish or reproduce the published form of these data, or allow others to do so, for Government purposes.
Access to and use of these Data shall impose the following obligations on the user, as set forth in this Agreement. The user is granted the right, without any fee or cost, to use, copy, modify, alter, enhance and distribute these Data for any purpose whatsoever, provided that this entire notice appears in all copies of the Data. Any modification, alteration or enhancement of these data shall be identified and documented by the user. Further, the user agrees to credit the DOE/NREL/Alliance in any publication that results from the use of these Data. The names DOE/NREL/Alliance, however, may not be used in any advertising or publicity to endorse or promote any products or commercial entities unless specific written permission is obtained from DOE/NREL/Alliance. The user also understands that DOE/NREL/Alliance is not obligated to provide the user with any support, consulting, training or assistance of any kind with regard to the use of these Data or to provide the user with any updates, revisions or new versions of these Data.
YOU AGREE TO INDEMNIFY THE GOVERNMENT AND DOE/NREL/ALLIANCE, AND ITS SUBSIDIARIES, AFFILIATES, OFFICERS, AGENTS, AND EMPLOYEES AGAINST ANY CLAIM OR DEMAND, INCLUDING REASONABLE ATTORNEYS' FEES, RELATED TO YOUR USE OF THESE DATA. THESE DATA ARE PROVIDED BY DOE/NREL/ALLIANCE "AS IS" AND ANY EXPRESS OR IMPLIED WARRANTIES, INCLUDING BUT NOT LIMITED TO, THE IMPLIED WARRANTIES OF MERCHANTABILITY AND FITNESS FOR A PARTICULAR PURPOSE ARE DISCLAIMED. IN NO EVENT SHALL THE GOVERNMENT OR DOE/NREL/ALLIANCE BE LIABLE FOR ANY SPECIAL, INDIRECT OR CONSEQUENTIAL DAMAGES OR ANY DAMAGES WHATSOEVER, INCLUDING BUT NOT LIMITED TO CLAIMS ASSOCIATED WITH THE LOSS OF DATA OR PROFITS, WHICH MAY RESULT FROM AN ACTION IN CONTRACT, NEGLIGENCE OR OTHER TORTIOUS CLAIM THAT ARISES OUT OF OR IN CONNECTION WITH THE ACCESS, USE OR PERFORMANCE OF THESE DATA.

## General comment
This unit process represents the operation of Class 1 line haul rail transportation, excluding passsenger railroads (Amtrak). The data scope is cradle-to-gate, encompassing the production and combustion of diesel, and commerical transportation on a per-ton-kilometer basis. Infrastructure maintenance and expansion activities are excluded from upstream impacts in this system. Emissions factors, pollutant species, and the average Class 1 fuel efficiency were identified using R-1 submittals from the Surface Transportation Board, and the 2020 National Emissions Inventory Locomotive Methodology.

## Technology
This unit process represents the operation of Class 1 line haul rail transportation, excluding passsenger railroads (Amtrak). Emissions are further specified by emissions control tier. Tiers indicate emissions standards for diesel locomotives established by the EPA, and apply to newly manufactured and remanufactured locomotives. Tiers correspond to the age and stringency of the standards: Tier 0 (1973-1992), Tier 1 (1993-2004), Tier 2 (2005-201), Tier 3 (2012-2014), Tier 4 (2015 onwards). Tiers marked with + (e.g. Tier 0+) indicate tiers inclusive of and above the indicated tier.

## Geography
This unit process is representative of Class I line haul railroad operation in the United States. Class I railroads account for 67% of rail mileage and 94% of rail revenue in the US circa 2023.

## Time period
This unit process is representative of operations from 2020-2024. Pollutant species were sourced from a 2020 report. Fuel efficiency was averaged from STB R-1 data in 2024.

## Reference product
- Transport, rail, freight; diesel powered; emissions tier No Emissions Control: 1 t*km; data quality (2,2,1,1,1)

## Inputs
- Diesel, at refinery: 0.00117041 gal (US fl); data quality (2,2,1,1,1)

## Outputs
All rows: data quality (2,2,1,1,1)
- Methane: 9.3633e-7 kg
- Carbon monoxide: 3.11611e-5 kg
- Carbon dioxide: 0.0118797 kg
- Nitrous oxide: 3.04307e-7 kg
- Ammonia: 9.74954e-8 kg
- Nitrogen oxides: 0.00031648 kg
- Particulate matter, > 2.5μm and ≤ 10μm: 7.79027e-6 kg
- Particulate matter, > 10μm: 7.55656e-6 kg
- Sulfur dioxide: 1.09902e-7 kg
- Volatile organic compounds: 1.23047e-5 kg

## Inventory method
Attributional process. The scope of the foreground data is use-phase and is limited to the direct combustion of diesel fuel for locomotive operation. The whole process scope is cradle-to-gate, encompassing the production and combustion of diesel, and commerical transportation on a per-ton-kilometer basis. Infrastructure maintenance and expansion activities are excluded from upstream impacts in this system. Full range of emissions covered.

## Modelling constants
Methods for compiling emissions factors are described in the 2020 NEI report. Fuel efficiency was estimated using a numerical average across all engine tiers in the year 2024.

## Completeness
The mass balance for this process was not calculated. Infrastructure maintenance and expansion was not allocated to this unit process. Inventory development methods are detailed in the cited 2020 NEI report.

## Data selection
Data selection methods for emissions factors are detailed in the 2020 NEI report. Class II and III data are not included in this inventory due to low data availability.

## Data treatment
The NEI locomotive methodology contains emissions factors on a grams pollutant per gallon fuel basis. Fuel efficiency was estimated using a numerical average across all engine tiers in the year 2024 based on STB R-1 reports. These values were paired to express emissions in terms of kg-pollutant per ton-kilometer transported.

## Sampling procedure
Uncertainty was not calculated for this process. Sampling methods for emissions factors are described in detail in the 2020 NEI report. Production and combustion of diesel fuel is included in the scope of this process. Upstream diesel data provided by USLCI.

## Intended application
This process is intended to provide US average emissions for tier-specific rail transportation. This data is intended to be used for accounting/ descriptive purposes. The inventory is intended for general and/or expert use.

## Project
This dataset was developed by the Federal LCA Commons Data Curator Eastern Research Group, Inc. (ERG) under subcontract (SUB-2024-10066) to the National Renewable Energy Laboratory under Department of Energy (DOE) Prime Contract No. DE-AC36-08GO28308. The work is funded by DOE's Advanced Materials & Manufacturing Technologies Office (AMMTO).

## Sources
- EPA (2020) National Emissions Inventory: Locomotive Methodology. U.S. Environmental Protection Agency, National Vehicle and Fuel Emissions Laboratory
- BNSF Railway Company (2025) Annual Report R-1 to the Surface Transportation Board for the year ending December 31, 2024
- CSX Transportation Inc. (2025) Annual Report R-1 to the Surface Transportation Board for the year ending December 31, 2024
- Grand Trunk Corporation (2025) Annual Report R-1 to the Surface Transportation Board for the year ending December 31, 2024
- Norfolk Southern Railway Company (2025) Annual Report R-1 to the Surface Transportation Board for the year ending December 31, 2024
- Soo Line Railway Company & Kansas City Southern Railway Company (2025) Annual Report R-1 to the Surface Transportation Board for the year ending December 31, 2024
- Union Pacific Railroad Company (2025) Annual Report R-1 to the Surface Transportation Board for the year ending December 31, 2024
- ERG (2025) USLCI-rail documentation
