# Natural Gas Combustion, Internal Combustion Engines, Industrial, Natural Gas, 2-cycle Lean Burn, SNCR

Dataset: openLCA process, unit process
Category: NETL combustion unit processes-- DRAFT
Geography: United States of America (the)
Time period: 2012 to 2014
Allocation method: physical allocation
Data quality: US EPA - Process Pedigree Matrix (3;1)
Exchange data quality scheme: US EPA - Flow Pedigree Matrix
Generated by: ERG
Published in: NETL Stationary Combustion
isCopyrightProtected: False
restrictionsDescription: Neither the U.S. Department of Energy (DOE) National Energy Technology Laboratory (NETL) nor any person acting on behalf of these organizations: A. Makes any warranty or representation, express or implied, with respect to the accuracy, completeness, or usefulness of the information contained in this document, or that the use of any information, apparatus, method, or process disclosed in this document may not infringe on privately owned rights; or B. Assumes any liability with this report as to its use, or damages resulting from the use of any information, apparatus, method, or process disclosed in this document. Reference herein to any specific commercial product, process, or service by trade name, trademark, manufacturer, or otherwise, does not necessarily constitute or imply its endorsement, recommendation, or favoring by NETL. The views and opinions of the authors expressed herein do not necessarily state or reflect those of NETL.

## General comment
This unit process represents the combustion of natural gas. The data scope is gate-to-grave, encompassing the combustion of fuel in the specified equipment. The data was developed from NETL datasets, which incorporate Webfire circa 2014 as the primry source of emissions factors.

## Technology
Data represents combustion of natural gas in external combustion boilers and internal combustion engines.

## Geography
United States

## Time period
Data best represents 2012

## Reference product
- Natural Gas Combustion, Internal Combustion Engines, Industrial, Natural Gas, 2-cycle Lean Burn, SNCR: 1 kg; input; data quality (2,5,1,1,3)

## Outputs
All rows: data quality (2,5,1,1,3)
- Acenaphthene: 3.21072e-8 kg
  Acenaphthene [unspecified]
- Acenaphthylene: 7.65262e-8 kg
- Acetaldehyde: 0.000187332 kg
- Acrolein: 0.000187815 kg
  Acrolein [Group NMVOC to air]
- Ammonia: 0.434533 kg
- Anthracene: 1.73331e-8 kg
  Anthracene [Group PAH to air]
- Arsenic(V): 4.71039e-9 kg
  Arsenic (+V) [Heavy metals to air]
- Barium: 1.03629e-7 kg
  Barium [Inorganic emissions to air]
- Benzene: 4.6833e-5 kg
  Benzene [Group NMVOC to air]
- Benz[a]anthracene: 8.11129e-9 kg
  Benzo (a) anthracene
- Benzo[a]pyrene: 1.37119e-10 kg
  Benzo (a) pyrene
- Benzo(b)fluoranthene: 2.05438e-10 kg
  Benzo (b) fluoranthene
- Benzo[e]pyrene: 5.64893e-10 kg
  Benzo (e) pyrene
- Benzo[ghi]perylene: 5.9869e-10 kg
  Benzo (g,h,i) perylene
- Benzo[k]fluoranthene: 1.0284e-10 kg
  Benzo (k) fluoranthene
- Beryllium: 2.82623e-10 kg
  Beryllium [Inorganic emissions to air]
- Biphenyl: 9.53559e-8 kg
  Biphenyl [Group NMVOC to air]
- 1,3-Butadiene: 1.97954e-5 kg
- Butane: 0.000114669 kg
  n-Butane
- Cadmium: 2.59071e-8 kg
  Cadmium [Heavy metals to air]
- Carbon dioxide: 2.65548 kg
- Carbon monoxide: 0.00931833 kg
- Carbon tetrachloride: 1.46534e-6 kg
- Chlorobenzene: 1.07185e-6 kg
  Chlorobenzene [Halogenated organic emissions to air]
- Chloroform: 1.13703e-6 kg
  Trichloromethane (chloroform) [Halogenated organic emissions to air]
- Chromium: 3.29727e-8 kg
  Chromium (unspecified) [Heavy metals to air]
- Chrysene: 1.62226e-8 kg
  Chrysene [Group PAH to air]
- Cobalt: 1.97836e-9 kg
  Cobalt [Heavy metals to air]
- Copper: 2.00192e-8 kg
  Copper [Inorganic emissions to air]
- Cyclohexane: 7.43535e-6 kg
  Cyclohexane (hexahydro benzene) [Group NMVOC to air]
- Cyclopentane: 2.28613e-6 kg
  Cyclopentane [Group NMVOC to air]
- Dibenz[a,h]anthracene: 2.82623e-11 kg
  Dibenzo(a,h) anthracene
- Dichlorobenzene: 2.82623e-8 kg
  Dichlorobenzene, mixed isomers
- 1,1-Dichloroethane: 9.43903e-7 kg
- Methylene chloride: 3.54869e-6 kg
  Dichloromethane (methylene chloride) [Halogenated organic emissions to air]
- 1,3-Dichloropropene: 1.05736e-6 kg
- 7,12-Dimethylbenz[a]anthracene: 3.76831e-10 kg
  Dimethylbenz(a)anthracene
- Ethane: 0.00171158 kg
  Ethane [Group NMVOC to air]
- Ethylbenzene: 2.6072e-6 kg
- Ethylene dibromide: 1.77193e-6 kg
- 1,2-Dichloroethane: 1.01874e-6 kg
  Ethylene dichloride
- Fluoranthene: 8.71481e-9 kg
- Fluorene: 4.07979e-8 kg
- Formaldehyde: 0.00133257 kg
- Indeno[1,2,3-cd]pyrene: 2.39718e-10 kg
  Indeno(1,2,3-cd)pyrene
- Isobutane: 9.05278e-5 kg
  iso-Butane [Group NMVOC to air]
- Isobutyraldehyde: 1.05495e-5 kg
- Xylene: 6.46972e-6 kg
  Isomers of xylene
- Lead: 1.1776e-8 kg
  Lead [Heavy metals to air]
- Manganese: 8.94974e-9 kg
  Manganese [Heavy metals to air]
- Mercury: 6.12351e-9 kg
  Mercury [Heavy metals to air]
- Methane: 0.0350041 kg
- Methanol: 5.9869e-5 kg
  Methyl alcohol
- 2-Methylnaphthalene: 5.16612e-7 kg
  2-Methyl Naphthalene
- 3-Methylcholanthrene: 4.23935e-11 kg
- Methylcyclohexane: 8.15957e-6 kg
- Molybdenum: 2.59071e-8 kg
  Molybdenum [Heavy metals to air]
- Hexane: 1.07426e-5 kg
  N-Hexane
- Nonane: 7.43535e-7 kg
  N-Nonane
- Octane: 1.79607e-6 kg
  N-Octane
- Pentane: 3.69353e-5 kg
  N-Pentane
- Naphthalene: 2.32475e-6 kg
- Nickel(II): 4.94591e-8 kg
  Nickel (+II) [Heavy metals to air]
- Nitrogen oxides: 0.0581599 kg
  Nitrogen oxides (NOx)
- Perylene: 1.1998e-10 kg
  Perylene [Group NMVOC to air]
- Phenanthrene: 8.52168e-8 kg
- Phenol: 1.01633e-6 kg
  Phenol (hydroxy benzene) [Group NMVOC to air]
- Particulate matter, > 10μm: 4.47479e-5 kg
  >PM10
- Particulate matter, ≤ 2.5μm: 8.82338e-10 kg
  Dust (PM2.5) [Other emissions to air]
- PAH/POM, unspecified: 3.23486e-6 kg
  Polycyclic aromatic hydrocarbons (PAH)
- Propane: 0.000692839 kg
  Propane [Group NMVOC to air]
- 1,2-Diaminopropane: 1.07668e-6 kg
  Propylene dichloride
- Pyrene: 1.40982e-8 kg
  Pyrene [Group PAH to air]
- Selenium: 5.65247e-10 kg
  Selenium [Heavy metals to air]
- Styrene: 1.32291e-6 kg
  Styrene [Group NMVOC to air]
- Sulfur dioxide: 1.41948e-5 kg
- 1,1,2,2-Tetrachloroethane: 1.60053e-6 kg
- Toluene: 2.32475e-5 kg
  Toluene (methyl benzene) [Group NMVOC to air]
- Total Organic Carbon: 0.0395908 kg
  Total organic compounds (TOC)
- 1,1,2-Trichloroethane: 1.27222e-6 kg
- 1,2,3-Trimethylbenzene: 8.54582e-7 kg
- 1,2,4-Trimethylbenzene: 2.67962e-6 kg
- 1,3,5-Trimethylbenzene: 4.34533e-7 kg
- 2,2,4-Trimethylpentane: 2.04231e-5 kg
- Vanadium(III): 5.41695e-8 kg
  Vanadium (+III) [Heavy metals to air]
- Total Organic Carbon: 5.96276e-7 kg
  Vinyl chloride
- Volatile organic compounds: 0.00289689 kg
  Volatile organic compounds (VOC)
- Zinc: 6.83006e-7 kg
  Zinc [Inorganic emissions to air]
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
## Inventory method
Attributional

## Completeness
All Relevant Flows Captured

## Data selection
NETL calculates combustion emissions based on the data reported in the EPA WebFIRE database. WebFIRE is the EPA's online database that contains emissions factors for criteria and hazardous air pollutants (HAP) for industrial and non-industrial processes and multiple reports submitted to the EPA using the Compliance and Emissions Data Reporting Interface (CEDRI) in response to regulatory requirements under Parts 60 and 63 of Title 40 of the U.S. Code of Federal Regulations (CFR).

## Data treatment
NETL calculates combustion emissions based on the data reported in the EPA WebFIRE database.The database was filtered down to the intended fuel and equipment type, and emissions were normalized to the basis of 1 kg fuel combusted.

## Data collection
Emissions data were collected from the EPA WebFIRE database.

## Sampling procedure
For information on how data were collected, see Publication.

## Intended application
This unit process is intended as a stand-alone gate-to-gate representation of Natural Gas combustion in industrial boilers or internal combustion engines. It may be applied as a generic data source in other models.

## Project
This unit process includes the emissions associated with the combustion of natural gas.

## Sources
- Combustion of Natural Gas
- Compilation of Air Pollutant Emission Factors
- WebFIRE
- Development and Selection of Ammonia Emission Factors Final Report
- Interactive Units Converter
- Calculators for Energy Used in the United States
- Pounds to Nanograms Conversion Calculator
- Emission factors for greenhouse gas inventories
