# Diesel Combustion, Turbine, Industrial, SNCR

Dataset: openLCA process, unit process
Category: NETL combustion unit processes-- DRAFT
Geography: United States of America (the)
Time period: 2012 to 2014
Allocation method: physical allocation
Exchange data quality scheme: US EPA - Flow Pedigree Matrix
Generated by: ERG
Published in: NETL Stationary Combustion
isCopyrightProtected: False
restrictionsDescription: Neither the U.S. Department of Energy (DOE) National Energy Technology Laboratory (NETL) nor any person acting on behalf of these organizations: A. Makes any warranty or representation, express or implied, with respect to the accuracy, completeness, or usefulness of the information contained in this document, or that the use of any information, apparatus, method, or process disclosed in this document may not infringe on privately owned rights; or B. Assumes any liability with this report as to its use, or damages resulting from the use of any information, apparatus, method, or process disclosed in this document. Reference herein to any specific commercial product, process, or service by trade name, trademark, manufacturer, or otherwise, does not necessarily constitute or imply its endorsement, recommendation, or favoring by NETL. The views and opinions of the authors expressed herein do not necessarily state or reflect those of NETL.

## General comment
This unit process represents the combustion of diesel fuel. The data scope is gate-to-grave, encompassing the combustion of fuel in the specified equipment. The data was developed from NETL datasets, which incorporate Webfire circa 2014 as the primry source of emissions factors.

## Technology
Data represents combustion of diesel fuel in external combustion boilers and internal combustion engines.

## Geography
United States

## Time period
Data best represents 2012

## Reference product
- Diesel Combustion, Turbine, Industrial, SNCR: 1 kg; input; data quality (2,5,1,1,3)

## Outputs
All rows: data quality (2,5,1,1,3)
- 1,3-Butadiene: 2.95608e-7 kg
  1,3-Butadiene [Group NMVOC to air]
- Arsenic(V): 2.0323e-7 kg
  Arsenic (+V) [Heavy metals to air]
- Benzene: 1.01615e-6 kg
  Benzene [Group NMVOC to air]
- Benz[a]anthracene: 0.000554264 kg
  Benzo{a}anthracene [Group PAH to air]
- Benzo[a]pyrene: 3.55812e-11 kg
  Benzo{a}pyrene [Group PAH to air]
- Beryllium: 5.7274e-9 kg
  Beryllium [Inorganic emissions to air]
- Cadmium: 8.86823e-8 kg
  Cadmium [Heavy metals to air]
- Methane: 0.000128461 kg
  Methane [Organic emissions to air]
- Chromium: 2.0323e-7 kg
  Chromium (unspecified) [Heavy metals to air]
- Chrysene: 2.13487e-10 kg
  Chrysene [Group PAH to air]
- Carbon monoxide: 6.09691e-5 kg
  Carbon monoxide [Inorganic emissions to air]
- Carbon dioxide: 3.19898 kg
  Carbon dioxide [Inorganic emissions to air]
- Fluoranthene: 1.11488e-9 kg
  Fluoranthene [Group NMVOC to air]
- Formaldehyde: 5.17313e-6 kg
  Formaldehyde (methanal) [Group NMVOC to air]
- Hydrocarbons: 0 kg
  Hydrocarbons (unspecified) [Organic emissions to air (group VOC)]
- Hydrocarbons: 0 kg
  Hydrocarbons (other than methane) [Organic emissions to air]
- Lead: 2.58657e-7 kg
  Lead [Heavy metals to air]
- Manganese: 1.45956e-5 kg
  Manganese [Heavy metals to air]
- Mercury: 2.21706e-8 kg
  Mercury [Heavy metals to air]
- Nitrous oxide: 2.50655e-5 kg
  Nitrous oxide (laughing gas) [Inorganic emissions to air]
- Naphthalene: 6.46641e-7 kg
  Naphthalene [Group PAH to air]
- Ammonia: 0.000412145 kg
  Ammonia [Inorganic emissions to air]
- Nickel(II): 8.49872e-8 kg
  Nickel (+II) [Heavy metals to air]
- Nitric oxide: 0.00310416 kg
  Nitrogen monoxide [Inorganic emissions to air]
- Nitrogen dioxide: 0.000147525 kg
  Nitrogen dioxide [Inorganic emissions to air]
- Nitrogen oxides: 0.00325168 kg
  Nitrogen oxides [Inorganic emissions to air]
- Particulate matter, > 10μm: 1.23786e-5 kg
  Dust (> PM10) [Particles to air]
- Particulate matter, > 2.5μm and ≤ 10μm: 4.80362e-6 kg
  Dust (PM2.5 - PM10) [Particles to air]
- Particulate matter, ≤ 2.5μm: 0.000204523 kg
  Dust (PM2.5) [Other emissions to air]
- Carbon black: 0.000157483 kg
  Black carbon [Particles to air]
- Organic carbon, PM2.5 LC: 3.14966e-5 kg
  Organic carbon [Other emissions to air]
- Organic carbon, PM2.5 LC: 3.14966e-5 kg
  Organic carbon [Emissions to air]
- Polycyclic aromatic hydrocarbons: 7.39019e-7 kg
  Polycyclic aromatic hydrocarbons (carcinogenic) [Group PAH to air]
- Selenium: 4.61887e-7 kg
  Selenium [Heavy metals to air]
- Sulfur dioxide: 0.000609691 kg
  Sulphur dioxide [Inorganic emissions to air]
- Total Organic Carbon: 7.39019e-5 kg
  TOC, Total Organic Carbon [unspecified]
- Total Organic Carbon: 7.39019e-5 kg
  Total organic carbon [Other emissions to air]
- Volatile organic compounds: 7.57494e-6 kg
  NMVOC (unspecified) [Group NMVOC to air]
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
## Inventory method
Attributional

## Completeness
All Relevant Flows Captured

## Data selection
NETL calculates combustion emissions based on the data reported in the EPA WebFIRE database. WebFIRE is the EPA's online database that contains emissions factors for criteria and hazardous air pollutants (HAP) for industrial and non-industrial processes and multiple reports submitted to the EPA using the Compliance and Emissions Data Reporting Interface (CEDRI) in response to regulatory requirements under Parts 60 and 63 of Title 40 of the U.S. Code of Federal Regulations (CFR).

## Data treatment
NETL calculates combustion emissions based on the data reported in the EPA WebFIRE database.The database was filtered down to the intended fuel and equipment type, and emissions were normalized to the basis of 1 kg fuel combusted.

## Data collection
Emissions data were collected from the EPA WebFIRE database.

## Sampling procedure
For information on how data were collected, see Publication.

## Intended application
This unit process is intended as a stand-alone gate-to-gate representation of diesel fuel combusted in external combustion boilers and internal combustion enginess. It may be applied as a generic data source in other models.

## Project
This unit process includes the emissions associated with the combustion of diesel fuel.

## Sources
- Emission factors for greenhouse gas inventories
- Development of baseline data and analysis of life cycle greenhouse gas emissions of petroleum-based fuels
- Diesel Generator Exhaust, SPECIATE 4.2
- Diesel Exhaust, SPECIATE 4.2
- Report to Congress on Black Carbon
- "A-400 DRAFT Inventory of U.S. Greenhouse Gas Emissions and Sinks: 1990-2012"
- WebFIRE
- MOVES 2010b model
- Transport, passenger car, diesel powered
- State of the Art (SOTA) Manual for Reciprocating Internal Combustion Engines
- Nitrogen Oxides (NOx), Why and How They Are Controlled
- Lists of potential control measures for PM2.5 and precursors, Draft Version 1.0
- "Compilation of Air Pollutant Emission Factors, Volume 1: Stationary Point and Area Sources, Chapter 1: External Combustion Source, Section 3: Fuel Oil Combustion"
- Development and Selection of Ammonia Emission Factors
- Direct Emissions from Stationary Combustion Sources
- Uncontrolled Emission Factor Listing for Criteria Air Pollutants
- "Regulatory Impact Analysis: Control of Emissions of Air Pollution from Category 3 Marine Diesel Engines"
- "Regulatory Announcement: Emission Standards Adopted for New Marine Diesel Engines"
- Analysis of Commercial Marine Vessels Emissions and Fuel Consumption Data
- Nonroad Diesel Engines
- Exhaust and Crankcase Emission Factors for Nonroad Engine Modeling - Compression-Ignition
- Diesel Fuel
- "Control of Emissions from New and In-Use Nonroad Compression-Ignition Engines: Emission Standards and Related Requirements, 40 C.F.R. §1039.101"
- Locomotives
- Definitions of EIA Distillate Categories and Fuels Contained in the Distillate Grouping
- Transport, passenger car, diesel powered
- Life Cycle Analysis of Conventional and Alternative Marine Fuels in GREET
