# Diesel Combustion, Marine Vessel, Category 2 Engine, Marine Distillate

Dataset: openLCA process, unit process
Category: NETL combustion unit processes-- DRAFT
Geography: United States of America (the)
Time period: 2012 to 2014
Allocation method: physical allocation
Exchange data quality scheme: US EPA - Flow Pedigree Matrix
Generated by: ERG
Published in: NETL Stationary Combustion
isCopyrightProtected: False
restrictionsDescription: Neither the U.S. Department of Energy (DOE) National Energy Technology Laboratory (NETL) nor any person acting on behalf of these organizations: A. Makes any warranty or representation, express or implied, with respect to the accuracy, completeness, or usefulness of the information contained in this document, or that the use of any information, apparatus, method, or process disclosed in this document may not infringe on privately owned rights; or B. Assumes any liability with this report as to its use, or damages resulting from the use of any information, apparatus, method, or process disclosed in this document. Reference herein to any specific commercial product, process, or service by trade name, trademark, manufacturer, or otherwise, does not necessarily constitute or imply its endorsement, recommendation, or favoring by NETL. The views and opinions of the authors expressed herein do not necessarily state or reflect those of NETL.

## General comment
This unit process represents the combustion of diesel fuel. The data scope is gate-to-grave, encompassing the combustion of fuel in the specified equipment. The data was developed from NETL datasets, which incorporate Webfire circa 2014 as the primry source of emissions factors.

## Technology
Data represents combustion of diesel fuel in external combustion boilers and internal combustion engines.

## Geography
United States

## Time period
Data best represents 2012

## Reference product
- Diesel Combustion, Marine Vessel, Category 2 Engine, Marine Distillate: 1 kg; input; data quality (2,5,1,1,3)

## Outputs
All rows: data quality (2,5,1,1,3)
- 1,3-Butadiene: 7.22392e-7 kg
  1,3-Butadiene [Group NMVOC to air]
- Acenaphthene: 2.62352e-8 kg
  Acenaphthene [unspecified]
- Acenaphthene: 2.62352e-8 kg
  Acenaphthene [Group PAH to air]
- Acenaphthylene: 9.3486e-8 kg
  Acenaphthylene [Organic emissions to air (group VOC)]
- Acetaldehyde: 1.41707e-5 kg
  Acetaldehyde (Ethanal) [Group NMVOC to air]
- Acrolein: 1.70898e-6 kg
  Acrolein [Group NMVOC to air]
- Aldehydes, unspecified: 0.00129328 kg
  Aldehyde (unspecified) [Group NMVOC to air]
- Anthracene: 3.45492e-8 kg
  Anthracene [Group PAH to air]
- Benzene: 1.72376e-5 kg
  Benzene [Group NMVOC to air]
- Benz[a]anthracene: 3.10388e-8 kg
  Benzo{a}anthracene [Group PAH to air]
- Benzo[a]pyrene: 3.47339e-9 kg
  Benzo{a}pyrene [Group PAH to air]
- Benzo(b)fluoranthene: 1.83092e-9 kg
  Benzo{b}fluoranthene [Group PAH to air]
- Benzo[ghi]perylene: 9.03452e-9 kg
  Benzo{ghi}perylene [Group PAH to air]
- Benzo[k]fluoranthene: 2.8637e-9 kg
  Benzo{k}fluoranthene [Group PAH to air]
- Methane: 2.32432e-5 kg
  Methane [Organic emissions to air]
- Chrysene: 6.52185e-9 kg
  Chrysene [Group PAH to air]
- Carbon monoxide: 0.00594595 kg
  Carbon monoxide [Inorganic emissions to air]
- Carbon dioxide: 3.45946 kg
  Carbon dioxide [Inorganic emissions to air]
- Dibenz[a,h]anthracene: 1.07712e-8 kg
  Dibenz(a,h)anthracene [Group PAH to air]
- Fluoranthene: 1.40598e-7 kg
  Fluoranthene [Group NMVOC to air]
- Fluorene: 5.39484e-7 kg
  Fluorene [Group NMVOC to air]
- Formaldehyde: 2.18011e-5 kg
  Formaldehyde (methanal) [Group NMVOC to air]
- Hydrocarbons: 0 kg
  Hydrocarbons (unspecified) [Organic emissions to air (group VOC)]
- Hydrocarbons: 0 kg
  Hydrocarbons (other than methane) [Organic emissions to air]
- Indeno[1,2,3-cd]pyrene: 6.92831e-9 kg
  Indeno[1,2,3-cd]pyrene [Group PAH to air]
- Xylene: 5.26552e-6 kg
  Xylene (dimethyl benzene) [Group NMVOC to air]
- Mercury: 5.56851e-9 kg
  Mercury [Heavy metals to air]
- Nitrous oxide: 0.000162162 kg
  Nitrous oxide (laughing gas) [Inorganic emissions to air]
- Naphthalene: 1.56672e-6 kg
  Naphthalene [Group PAH to air]
- Nitric oxide: 0.0246538 kg
  Nitrogen monoxide [Inorganic emissions to air]
- Nitrogen dioxide: 0.0402111 kg
  Nitrogen dioxide [Inorganic emissions to air]
- Nitrogen oxides: 0.0648649 kg
  Nitrogen oxides [Inorganic emissions to air]
- Phenanthrene: 5.43179e-7 kg
  Phenanthrene [Group PAH to air]
- Particulate matter, > 2.5μm and ≤ 10μm: 0.000512821 kg
  Dust (PM2.5 - PM10) [Particles to air]
- Particulate matter, ≤ 2.5μm: 0.00666667 kg
  Dust (PM2.5) [Other emissions to air]
- Carbon black: 2.32432e-5 kg
  Black carbon [Particles to air]
- Organic carbon, PM2.5 LC: 6.97297e-6 kg
  Organic carbon [Other emissions to air]
- Organic carbon, PM2.5 LC: 6.97297e-6 kg
  Organic carbon [Emissions to air]
- Polycyclic aromatic hydrocarbons: 3.10388e-6 kg
  Polycyclic aromatic hydrocarbons (carcinogenic) [Group PAH to air]
- Propylene: 4.76668e-5 kg
  Propene (propylene) [Group NMVOC to air]
- Pyrene: 8.83129e-8 kg
  Pyrene [Group PAH to air]
- Sulfur oxides: 0.00437838 kg
  Sulphur oxide [Inorganic emissions to air]
- Total Organic Carbon: 0.00700648 kg
  TOC, Total Organic Carbon [unspecified]
- Total Organic Carbon: 0.00700648 kg
  Total organic carbon [Other emissions to air]
- Toluene: 7.55648e-6 kg
  Toluene (methyl benzene) [Group NMVOC to air]
- Volatile organic compounds: 0.0027027 kg
  NMVOC (unspecified) [Group NMVOC to air]
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
## Inventory method
Attributional

## Completeness
All Relevant Flows Captured

## Data selection
NETL calculates combustion emissions based on the data reported in the EPA WebFIRE database. WebFIRE is the EPA's online database that contains emissions factors for criteria and hazardous air pollutants (HAP) for industrial and non-industrial processes and multiple reports submitted to the EPA using the Compliance and Emissions Data Reporting Interface (CEDRI) in response to regulatory requirements under Parts 60 and 63 of Title 40 of the U.S. Code of Federal Regulations (CFR).

## Data treatment
NETL calculates combustion emissions based on the data reported in the EPA WebFIRE database.The database was filtered down to the intended fuel and equipment type, and emissions were normalized to the basis of 1 kg fuel combusted.

## Data collection
Emissions data were collected from the EPA WebFIRE database.

## Sampling procedure
For information on how data were collected, see Publication.

## Intended application
This unit process is intended as a stand-alone gate-to-gate representation of diesel fuel combusted in external combustion boilers and internal combustion enginess. It may be applied as a generic data source in other models.

## Project
This unit process includes the emissions associated with the combustion of diesel fuel.

## Sources
- Emission factors for greenhouse gas inventories
- Development of baseline data and analysis of life cycle greenhouse gas emissions of petroleum-based fuels
- Diesel Generator Exhaust, SPECIATE 4.2
- Diesel Exhaust, SPECIATE 4.2
- Report to Congress on Black Carbon
- "A-400 DRAFT Inventory of U.S. Greenhouse Gas Emissions and Sinks: 1990-2012"
- WebFIRE
- MOVES 2010b model
- Transport, passenger car, diesel powered
- State of the Art (SOTA) Manual for Reciprocating Internal Combustion Engines
- Nitrogen Oxides (NOx), Why and How They Are Controlled
- Lists of potential control measures for PM2.5 and precursors, Draft Version 1.0
- "Compilation of Air Pollutant Emission Factors, Volume 1: Stationary Point and Area Sources, Chapter 1: External Combustion Source, Section 3: Fuel Oil Combustion"
- Development and Selection of Ammonia Emission Factors
- Direct Emissions from Stationary Combustion Sources
- Uncontrolled Emission Factor Listing for Criteria Air Pollutants
- "Regulatory Impact Analysis: Control of Emissions of Air Pollution from Category 3 Marine Diesel Engines"
- "Regulatory Announcement: Emission Standards Adopted for New Marine Diesel Engines"
- Analysis of Commercial Marine Vessels Emissions and Fuel Consumption Data
- Nonroad Diesel Engines
- Exhaust and Crankcase Emission Factors for Nonroad Engine Modeling - Compression-Ignition
- Diesel Fuel
- "Control of Emissions from New and In-Use Nonroad Compression-Ignition Engines: Emission Standards and Related Requirements, 40 C.F.R. §1039.101"
- Locomotives
- Definitions of EIA Distillate Categories and Fuels Contained in the Distillate Grouping
- Transport, passenger car, diesel powered
- Life Cycle Analysis of Conventional and Alternative Marine Fuels in GREET
