# Gasoline Combustion, Mobile Source, Passenger Car

Dataset: openLCA process, unit process
Category: NETL combustion unit processes-- DRAFT
Geography: United States of America (the)
Time period: 2012 to 2014
Allocation method: physical allocation
Exchange data quality scheme: US EPA - Flow Pedigree Matrix
Generated by: ERG
Published in: NETL Stationary Combustion
isCopyrightProtected: False
restrictionsDescription: Neither the U.S. Department of Energy (DOE) National Energy Technology Laboratory (NETL) nor any person acting on behalf of these organizations: A. Makes any warranty or representation, express or implied, with respect to the accuracy, completeness, or usefulness of the information contained in this document, or that the use of any information, apparatus, method, or process disclosed in this document may not infringe on privately owned rights; or B. Assumes any liability with this report as to its use, or damages resulting from the use of any information, apparatus, method, or process disclosed in this document. Reference herein to any specific commercial product, process, or service by trade name, trademark, manufacturer, or otherwise, does not necessarily constitute or imply its endorsement, recommendation, or favoring by NETL. The views and opinions of the authors expressed herein do not necessarily state or reflect those of NETL.

## General comment
This unit process represents the combustion of gasoline. The data scope is gate-to-grave, encompassing the combustion of fuel in the specified equipment. The data was developed from NETL datasets, which incorporate Webfire circa 2014 as the primry source of emissions factors.

## Technology
Data represents combustion of gasoline fuel in internal combustion engines.

## Geography
United States

## Time period
Data best represents 2012

## Reference product
- Gasoline Combustion, Mobile Source, Passenger Car: 1 kg; input; data quality (2,5,1,1,3)

## Outputs
All rows: data quality (2,5,1,1,3)
- Sulfur oxides: 0 kg
  Sulphur oxide [Inorganic emissions to air]
- Sulfur dioxide: 5.89822e-5 kg
  Sulphur dioxide [Inorganic emissions to air]
- Volatile organic compounds: 0.00477885 kg
  NMVOC (unspecified) [Group NMVOC to air]
- Total Organic Carbon: 0 kg
  TOC, Total Organic Carbon [unspecified]
- Total Organic Carbon: 0 kg
  Total organic carbon [Other emissions to air]
- Ammonia: 0.000333658 kg
  Ammonia [Inorganic emissions to air]
- Aldehydes, unspecified: 0 kg
  Aldehyde (unspecified) [Group NMVOC to air]
- Carbon monoxide: 0.0542464 kg
  Carbon monoxide [Inorganic emissions to air]
- Nitrogen oxides: 0 kg
  NOX
- Nitrogen dioxide: 0.000686691 kg
  Nitrogen dioxide [Inorganic emissions to air]
- Nitric oxide: 0.00591975 kg
  Nitrogen monoxide [Inorganic emissions to air]
- Hydrocarbons: 0.00464969 kg
  Hydrocarbons (unspecified) [Organic emissions to air (group VOC)]
- Hydrocarbons: 0.00464969 kg
  Hydrocarbons (other than methane) [Organic emissions to air]
- Particulate matter, > 2.5μm and ≤ 10μm: 9.68686e-6 kg
  Dust (PM2.5 - PM10) [Particles to air]
- Particulate matter, ≤ 2.5μm: 0.000114735 kg
  Dust (PM2.5) [Other emissions to air]
- Carbon black: 2.17997e-5 kg
  Black carbon [Particles to air]
- Organic carbon, PM2.5 LC: 0.000187478 kg
  Organic carbon [Other emissions to air]
- Organic carbon, PM2.5 LC: 0.000187478 kg
  Organic carbon [Emissions to air]
- Carbon dioxide: 3.16437 kg
  Carbon dioxide [Inorganic emissions to air]
- Methane: 0.000180391 kg
  Methane [Organic emissions to air]
- Nitrous oxide: 0.000117103 kg
  Nitrous oxide (laughing gas) [Inorganic emissions to air]

## Inventory method
Attributional

## Completeness
All Relevant Flows Captured

## Data selection
NETL calculates combustion emissions based on the data reported in the EPA WebFIRE database. WebFIRE is the EPA's online database that contains emissions factors for criteria and hazardous air pollutants (HAP) for industrial and non-industrial processes and multiple reports submitted to the EPA using the Compliance and Emissions Data Reporting Interface (CEDRI) in response to regulatory requirements under Parts 60 and 63 of Title 40 of the U.S. Code of Federal Regulations (CFR).

## Data treatment
NETL calculates combustion emissions based on the data reported in the EPA WebFIRE database.The database was filtered down to the intended fuel and equipment type, and emissions were normalized to the basis of 1 kg fuel combusted.

## Data collection
Emissions data were collected from the EPA WebFIRE database.

## Sampling procedure
For information on how data were collected, see Publication.

## Intended application
This unit process is intended as a stand-alone gate-to-gate representation of gasoline fuel combusted in internal combustion engines. It may be applied as a generic data source in other models.

## Sources
- Development of baseline data and analysis of life cycle greenhouse gas emissions of petroleum-based fuels
- Table 1.8 Motor vehicle mileage, fuel consumption, and fuel economy
- Report to Congress on Black Carbon
- "A-400 DRAFT Inventory of U.S. Greenhouse Gas Emissions and Sinks: 1990-2012"
- WebFIRE
- Definitions of EIA Distillate Categories and Fuels Contained in the Distillate Grouping
- Transport, passenger car, gasoline powered
- Transport, passenger truck, gasoline powered
