# Kerosene Combustion, Turbine, Electric Generation, SNR

Dataset: openLCA process, unit process
Category: NETL combustion unit processes-- DRAFT
Geography: United States of America (the)
Time period: 2012 to 2014
Allocation method: physical allocation
Exchange data quality scheme: US EPA - Flow Pedigree Matrix
Generated by: ERG
Published in: NETL Stationary Combustion
isCopyrightProtected: False
restrictionsDescription: Neither the U.S. Department of Energy (DOE) National Energy Technology Laboratory (NETL) nor any person acting on behalf of these organizations: A. Makes any warranty or representation, express or implied, with respect to the accuracy, completeness, or usefulness of the information contained in this document, or that the use of any information, apparatus, method, or process disclosed in this document may not infringe on privately owned rights; or B. Assumes any liability with this report as to its use, or damages resulting from the use of any information, apparatus, method, or process disclosed in this document. Reference herein to any specific commercial product, process, or service by trade name, trademark, manufacturer, or otherwise, does not necessarily constitute or imply its endorsement, recommendation, or favoring by NETL. The views and opinions of the authors expressed herein do not necessarily state or reflect those of NETL.

## General comment
This unit process represents the combustion of kerosene fuel. The data scope is gate-to-grave, encompassing the combustion of fuel in the specified equipment. The data was developed from NETL datasets, which incorporate Webfire circa 2014 as the primry source of emissions factors.

## Technology
Data represents combustion of kerosene fuel in stationary fuel combustion heaters or internal combustion engines.

## Geography
United States

## Time period
Data best represents 2012

## Reference product
- Kerosene Combustion, Turbine, Electric Generation, SNR: 1 kg; input; data quality (2,5,1,1,3)

## Outputs
All rows: data quality (2,5,1,1,3)
- Methane: 0.000136549 kg
  Methane [Organic emissions to air]
- Carbon monoxide: 6.37677e-5 kg
  Carbon monoxide [Inorganic emissions to air]
- Carbon dioxide: 3.24721 kg
  Carbon dioxide [Inorganic emissions to air]
- Nitrous oxide: 2.66438e-5 kg
  Nitrous oxide (laughing gas) [Inorganic emissions to air]
- Ammonia: 0.0560383 kg
  Ammonia [Inorganic emissions to air]
- Particulate matter, > 10μm: 1.29468e-5 kg
  Dust (> PM10) [Particles to air]
- Particulate matter, > 2.5μm and ≤ 10μm: 5.02413e-6 kg
  Dust (PM2.5 - PM10) [Particles to air]
- Particulate matter, ≤ 2.5μm: 0.000213912 kg
  Dust (PM2.5) [Other emissions to air]
- Carbon black: 2.78085e-5 kg
  Black carbon [Particles to air]
- Organic carbon, PM2.5 LC: 0.000133481 kg
  Organic carbon [Other emissions to air]
- Organic carbon, PM2.5 LC: 0.000133481 kg
  Organic carbon [Emissions to air]
- Sulfur dioxide: 0.000637677 kg
  Sulphur dioxide [Inorganic emissions to air]
- Total Organic Carbon: 7.72942e-5 kg
  TOC, Total Organic Carbon [unspecified]
- Total Organic Carbon: 7.72942e-5 kg
  Total organic carbon [Other emissions to air]
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
## Inventory method
Attributional

## Completeness
All Relevant Flows Captured

## Data selection
NETL calculates combustion emissions based on the data reported in the EPA WebFIRE database. WebFIRE is the EPA's online database that contains emissions factors for criteria and hazardous air pollutants (HAP) for industrial and non-industrial processes and multiple reports submitted to the EPA using the Compliance and Emissions Data Reporting Interface (CEDRI) in response to regulatory requirements under Parts 60 and 63 of Title 40 of the U.S. Code of Federal Regulations (CFR).

## Data treatment
NETL calculates combustion emissions based on the data reported in the EPA WebFIRE database.The database was filtered down to the intended fuel and equipment type, and emissions were normalized to the basis of 1 kg fuel combusted.

## Data collection
Emissions data were collected from the EPA WebFIRE database.

## Sampling procedure
For information on how data were collected, see Publication.

## Intended application
This unit process is intended as a stand-alone gate-to-gate representation of kerosene fuel combusted in stationary fuel combustion heaters or internal combustion engines. It may be applied as a generic data source in other models.

## Project
This unit process includes the emissions associated with the combustion of kerosene fuel.

## Sources
- Emission factors for greenhouse gas inventories
- Development of baseline data and analysis of life cycle greenhouse gas emissions of petroleum-based fuels
- NO/NO2/HONO - Aircraft Exhaust, SPECIATE 4.2
- Report to Congress on Black Carbon
- "A-400 DRAFT Inventory of U.S. Greenhouse Gas Emissions and Sinks: 1990-2012"
- WebFIRE
- Definitions of EIA Distillate Categories and Fuels Contained in the Distillate Grouping
- Life-Cycle Analysis of Alternative Aviation Fuels in GREET
- Table 1.3-12. AP-42, Section 1.3, Fuel Oil Combustion
- Summarizing and interpreting aircraft gaseous and particulate emissions data
